# OpenSim document version 40000
InverseKinematicsTool WBDS01walkT01:
  marker_file: ..\..\Gait\WBDS01walkT01.trc
  time_range: 0 1.606667
  output_motion_file: WBDS01walkT01_ik_sample.mot
  report_marker_locations: true
  IKTaskSet MU2392_Arms_Scale:
    IKMarkerTask C7: apply=true weight=2
    IKMarkerTask T10: apply=true weight=0.5
    IKMarkerTask L1: apply=true weight=0.5
    IKMarkerTask STERNUM: apply=true weight=1
    IKMarkerTask XIPHOID: apply=true weight=0.5
    IKMarkerTask R.ASIS: apply=true weight=4
    IKMarkerTask L.ASIS: apply=true weight=4
    IKMarkerTask L.PSIS: apply=true weight=4
    IKMarkerTask R.PSIS: apply=true weight=4
    IKMarkerTask R.GTR: apply=true weight=3
    IKMarkerTask RT1: apply=true weight=1
    IKMarkerTask RT2: apply=true weight=1
    IKMarkerTask RT3: apply=true weight=1
    IKMarkerTask RT4: apply=true weight=1
    IKMarkerTask R.Knee: apply=true weight=3
    IKMarkerTask R.Knee.Medial: apply=true weight=3
    IKMarkerTask RS1: apply=true weight=1
    IKMarkerTask RS2: apply=true weight=1
    IKMarkerTask RS3: apply=true weight=1
    IKMarkerTask RS4: apply=true weight=1
    IKMarkerTask R.Ankle: apply=true weight=2
    IKMarkerTask R.Ankle.Medial: apply=true weight=2
    IKMarkerTask R.Heel: apply=true weight=2
    IKMarkerTask R.MT1: apply=true weight=2
    IKMarkerTask R.MT5: apply=true weight=2
    IKMarkerTask RTOE: apply=true weight=1
    IKMarkerTask L.GTR: apply=true weight=3
    IKMarkerTask LT1: apply=true weight=1
    IKMarkerTask LT2: apply=true weight=1
    IKMarkerTask LT3: apply=true weight=1
    IKMarkerTask LT4: apply=true weight=1
    IKMarkerTask L.Knee: apply=true weight=3
    IKMarkerTask L.Knee.Medial: apply=true weight=3
    IKMarkerTask LS1: apply=true weight=1
    IKMarkerTask LS2: apply=true weight=1
    IKMarkerTask LS3: apply=true weight=1
    IKMarkerTask LS4: apply=true weight=1
    IKMarkerTask L.Ankle: apply=true weight=2
    IKMarkerTask L.Ankle.Medial: apply=true weight=2
    IKMarkerTask L.Heel: apply=true weight=2
    IKMarkerTask L.MT1: apply=true weight=2
    IKMarkerTask L.MT5: apply=true weight=2
    IKMarkerTask LTOE: apply=true weight=1
    IKMarkerTask R.Iliac.Crest: apply=true weight=1
    IKMarkerTask L.Iliac.Crest: apply=true weight=1
    IKMarkerTask R.HF: apply=true weight=1
    IKMarkerTask L.HF: apply=true weight=1
    IKMarkerTask R.MT2: apply=true weight=1
    IKMarkerTask L.MT2: apply=true weight=1
    IKMarkerTask R.TT: apply=true weight=1
    IKMarkerTask L.TT: apply=true weight=1
