# OpenSim document version 40000
MarkerSet:
  Marker R.ASIS: pelvis (0.01138247 0.01796886 0.124782) fixed=true
  Marker L.ASIS: pelvis (0.01138247 0.01796886 -0.124782) fixed=true
  Marker R.PSIS: pelvis (-0.1851202 0.03478178 0.04371021) fixed=true
  Marker L.PSIS: pelvis (-0.1851202 0.03478178 -0.04371021) fixed=true
  Marker R.Knee: femur_r (0 -0.4057001 0.06262367) fixed=true
  Marker R.Knee.Medial: femur_r (0 -0.4116203 -0.06262367) fixed=true
  Marker R.Ankle: tibia_r (-0.0141479 -0.4487093 0.04612202) fixed=true
  Marker R.Ankle.Medial: tibia_r (0.005958487 -0.4357746 -0.03971374) fixed=true
  Marker R.Heel: calcn_r (-0.00933285 0.05725014 -0.01428697)
  Marker R.MT1: toes_r (0.007461104 0.01423122 -0.03576663) fixed=true
  Marker R.MT5: toes_r (-0.03406556 0.01291502 0.04117927) fixed=true
  Marker L.Knee: femur_l (0 -0.3987169 -0.06338541) fixed=true
  Marker L.Knee.Medial: femur_l (0 -0.4030796 0.06338541) fixed=true
  Marker L.Ankle: tibia_l (-0.01393513 -0.4467739 -0.04542839) fixed=true
  Marker L.Ankle.Medial: tibia_l (0.005868878 -0.4338949 0.03911649) fixed=true
  Marker L.Heel: calcn_l (-0.02474962 0.0197997 0.003696493) fixed=true
  Marker L.MT1: toes_l (0.007328647 0.01397857 0.03719186) fixed=true
  Marker L.MT5: toes_l (-0.03346079 0.01268574 -0.04282019) fixed=true
  Marker L.GTR: femur_l (-0.02540109 -0.01477949 -0.09791292) fixed=true
  Marker R.GTR: femur_r (-0.02185889 -0.01390138 0.09683496) fixed=true
  Marker R.Iliac.Crest: pelvis (-0.08247213 0.05566466 0.1652081) fixed=true
  Marker L.Iliac.Crest: pelvis (-0.08675032 0.0658913 -0.1650896) fixed=true
  Marker R.HF: tibia_r (-0.01926475 -0.08807136 0.06806562) fixed=true
  Marker L.HF: tibia_l (-0.0329695 -0.08149852 -0.06650216) fixed=true
  Marker L.TT: tibia_l (0.03267081 -0.09581631 -0.02797523)
  Marker R.TT: tibia_r (0.03627337 -0.08286555 0.01512756)
  Marker R.MT2: toes_r (0.01131711 0.01162894 -0.007092873)
  Marker L.MT2: toes_l (0.01108185 0.01139436 0.001998198)
