# OpenSim document version 40000
ScaleTool:
  mass: 74.3 [kg]
  height: -1
  age: -1
  GenericModelMaker:
    model_file: ..\..\..\..\Generic\LaiArnold2017_refined_torso_Loughborough_PublicDataset.osim
  ModelScaler:
    apply: true
    scaling_order: measurements
    marker_file: ..\..\Gait\WBDS01static1.trc
    time_range: 0.5 1.5
    preserve_mass_distribution: true
    output_model_file: GenericScaledModel_sample.osim
    output_scale_file: GenericScaleSet_sample.xml
    MeasurementSet:
      Measurement torso_height: apply=true
        MarkerPair: markers=(STERNUM XIPHOID)
        MarkerPair: markers=(C7 T10)
        MarkerPair: markers=(T10 L1)
        BodyScale torso: axes=Y
      Measurement torso_breadth: apply=true
        MarkerPair: markers=(C7 STERNUM)
        MarkerPair: markers=(T10 XIPHOID)
        BodyScale torso: axes=(X Z)
      Measurement pelvis_w: apply=true
        MarkerPair: markers=(R.ASIS L.ASIS)
        MarkerPair: markers=(R.PSIS L.PSIS)
        MarkerPair: markers=(R.Iliac.Crest L.Iliac.Crest)
        BodyScale pelvis: axes=Z
      Measurement pelvis_d: apply=true
        MarkerPair: markers=(R.ASIS R.PSIS)
        MarkerPair: markers=(L.ASIS L.PSIS)
        MarkerPair: markers=(R.Iliac.Crest R.PSIS)
        MarkerPair: markers=(L.Iliac.Crest L.PSIS)
        BodyScale pelvis: axes=X
      Measurement pelvis_h: apply=true
        MarkerPair: markers=(R.ASIS R.GTR)
        MarkerPair: markers=(R.PSIS R.GTR)
        MarkerPair: markers=(L.ASIS L.GTR)
        MarkerPair: markers=(L.PSIS L.GTR)
        MarkerPair: markers=(R.Iliac.Crest R.GTR)
        MarkerPair: markers=(L.Iliac.Crest L.GTR)
        BodyScale pelvis: axes=Y
      Measurement r_thigh_length: apply=true
        MarkerPair: markers=(R.GTR R.Knee)
        BodyScale femur_r: axes=Y
        BodyScale patella_r: axes=(X Y Z)
      Measurement r_thigh_breadth: apply=true
        MarkerPair: markers=(R.Knee R.Knee.Medial)
        BodyScale femur_r: axes=(X Z)
      Measurement r_tibia_length: apply=true
        MarkerPair: markers=(R.Knee R.Ankle)
        MarkerPair: markers=(R.Knee.Medial R.Ankle.Medial)
        MarkerPair: markers=(R.HF R.Ankle)
        BodyScale tibia_r: axes=Y
        BodyScale talus_r: axes=Y
      Measurement r_tibia_breadth: apply=true
        MarkerPair: markers=(R.Ankle R.Ankle.Medial)
        BodyScale tibia_r: axes=(X Z)
        BodyScale talus_r: axes=(X Z)
      Measurement r_foot_length: apply=true
        MarkerPair: markers=(R.Heel R.MT1)
        MarkerPair: markers=(R.Heel R.MT2)
        MarkerPair: markers=(R.Heel R.MT5)
        BodyScale calcn_r: axes=(X Y)
        BodyScale toes_r: axes=(X Y)
      Measurement r_foot_width: apply=true
        MarkerPair: markers=(R.MT1 R.MT5)
        BodyScale calcn_r: axes=Z
        BodyScale toes_r: axes=Z
      Measurement l_thigh_length: apply=true
        MarkerPair: markers=(L.GTR L.Knee)
        BodyScale femur_l: axes=Y
        BodyScale patella_l: axes=(X Y Z)
      Measurement l_thigh_breadth: apply=true
        MarkerPair: markers=(L.Knee L.Knee.Medial)
        BodyScale femur_l: axes=(X Z)
      Measurement l_tibia_length: apply=true
        MarkerPair: markers=(L.Knee L.Ankle)
        MarkerPair: markers=(L.Knee.Medial L.Ankle.Medial)
        MarkerPair: markers=(L.HF L.Ankle)
        BodyScale tibia_l: axes=Y
        BodyScale talus_l: axes=Y
      Measurement l_tibia_breadth: apply=true
        MarkerPair: markers=(L.Ankle L.Ankle.Medial)
        BodyScale tibia_l: axes=(X Z)
        BodyScale talus_l: axes=(X Z)
      Measurement l_foot_length: apply=true
        MarkerPair: markers=(L.Heel L.MT1)
        MarkerPair: markers=(L.Heel L.MT2)
        MarkerPair: markers=(L.Heel L.MT5)
        BodyScale calcn_l: axes=(X Y)
        BodyScale toes_l: axes=(X Y)
      Measurement l_foot_width: apply=true
        MarkerPair: markers=(L.MT1 L.MT5)
        BodyScale calcn_l: axes=Z
        BodyScale toes_l: axes=Z
  MarkerPlacer:
    apply: true
    marker_file: ..\..\Gait\WBDS01static1.trc
    time_range: 0.5 1.5
    output_motion_file: StaticMotion_sample.mot
    output_model_file: GenericScaledModel_adjusted_sample.osim
    output_marker_file: StaticMarkers_sample.xml
    max_marker_movement: -1
    IKTaskSet:
      IKMarkerTask C7: apply=true weight=3
      IKMarkerTask T10: apply=true weight=3
      IKMarkerTask L1: apply=true weight=2
      IKMarkerTask STERNUM: apply=true weight=3
      IKMarkerTask XIPHOID: apply=true weight=2
      IKMarkerTask R.ASIS: apply=true weight=5
      IKMarkerTask L.ASIS: apply=true weight=5
      IKMarkerTask L.PSIS: apply=true weight=5
      IKMarkerTask R.PSIS: apply=true weight=5
      IKMarkerTask RHJC: apply=true weight=5
      IKMarkerTask R.GTR: apply=true weight=3
      IKMarkerTask RT1: apply=true weight=1
      IKMarkerTask RT2: apply=true weight=1
      IKMarkerTask RT3: apply=true weight=1
      IKMarkerTask RT4: apply=true weight=1
      IKMarkerTask R.Knee: apply=true weight=3
      IKMarkerTask R.Knee.Medial: apply=true weight=3
      IKMarkerTask RKJC: apply=true weight=5
      IKMarkerTask RS1: apply=true weight=1
      IKMarkerTask RS2: apply=true weight=1
      IKMarkerTask RS3: apply=true weight=1
      IKMarkerTask RS4: apply=true weight=1
      IKMarkerTask R.Ankle: apply=true weight=5
      IKMarkerTask R.Ankle.Medial: apply=true weight=5
      IKMarkerTask R.Heel: apply=true weight=1
      IKMarkerTask R.MT1: apply=true weight=3
      IKMarkerTask R.MT5: apply=true weight=3
      IKMarkerTask RTOE: apply=true weight=1
      IKMarkerTask LHJC: apply=true weight=5
      IKMarkerTask L.GTR: apply=true weight=3
      IKMarkerTask LT1: apply=true weight=1
      IKMarkerTask LT2: apply=true weight=1
      IKMarkerTask LT3: apply=true weight=1
      IKMarkerTask LT4: apply=true weight=1
      IKMarkerTask L.Knee: apply=true weight=3
      IKMarkerTask L.Knee.Medial: apply=true weight=3
      IKMarkerTask LKJC: apply=true weight=5
      IKMarkerTask LS1: apply=true weight=1
      IKMarkerTask LS2: apply=true weight=1
      IKMarkerTask LS3: apply=true weight=1
      IKMarkerTask LS4: apply=true weight=1
      IKMarkerTask L.Ankle: apply=true weight=5
      IKMarkerTask L.Ankle.Medial: apply=true weight=5
      IKMarkerTask L.Heel: apply=true weight=1
      IKMarkerTask L.MT1: apply=true weight=3
      IKMarkerTask L.MT5: apply=true weight=3
      IKMarkerTask LTOE: apply=true weight=1
      IKMarkerTask R.Iliac.Crest: apply=true weight=1
      IKMarkerTask L.Iliac.Crest: apply=true weight=1
      IKMarkerTask R.HF: apply=true weight=1
      IKMarkerTask L.HF: apply=true weight=1
      IKMarkerTask R.MT2: apply=true weight=1
      IKMarkerTask L.MT2: apply=true weight=1
      IKMarkerTask R.TT: apply=true weight=1
      IKMarkerTask L.TT: apply=true weight=1
