# OpenSim document version 40000
MarkerSet:
  Marker R.ASIS: pelvis (0.01168645 0.0182651 0.1303971) fixed=true
  Marker L.ASIS: pelvis (0.01168645 0.0182651 -0.1303971) fixed=true
  Marker R.PSIS: pelvis (-0.190064 0.03535519 0.04567715) fixed=true
  Marker L.PSIS: pelvis (-0.190064 0.03535519 -0.04567715) fixed=true
  Marker R.Knee: femur_r (-0.008257348 -0.3989275 0.06308021)
  Marker R.Knee.Medial: femur_r (0 -0.4116203 -0.06262367) fixed=true
  Marker R.Ankle: tibia_r (-0.0141479 -0.4487093 0.04612202) fixed=true
  Marker R.Ankle.Medial: tibia_r (-0.001783347 -0.4154088 -0.04028624)
  Marker R.Heel: calcn_r (-0.009683348 0.05713644 -0.01280272)
  Marker R.MT1: toes_r (0.007336203 0.01399298 -0.03576663) fixed=true
  Marker R.MT5: toes_r (-0.03349529 0.01269882 0.04117927) fixed=true
  Marker L.Knee: femur_l (0 -0.3987169 -0.06338541) fixed=true
  Marker L.Knee.Medial: femur_l (0 -0.4030796 0.06338541) fixed=true
  Marker L.Ankle: tibia_l (-0.02067475 -0.4424005 -0.0401293)
  Marker L.Ankle.Medial: tibia_l (0.005868878 -0.4278066 0.03911649) fixed=true
  Marker L.Heel: calcn_l (-0.01638833 0.03591811 0.01077847)
  Marker L.MT1: toes_l (0.01163454 0.01912762 0.0286812)
  Marker L.MT5: toes_l (-0.01739446 -0.0008349079 -0.04935408)
  Marker L.GTR: femur_l (-0.02540109 -0.01477949 -0.09791292) fixed=true
  Marker R.GTR: femur_r (-0.01613929 -0.00749668 0.09718896)
  Marker R.Iliac.Crest: ground (-0.05851561 0.98539 0.1499334) fixed=true
  Marker L.Iliac.Crest: ground (-0.05675848 0.9811743 -0.1525122) fixed=true
  Marker R.HF: ground (-0.07208639 0.368719 0.1455297) fixed=true
  Marker L.HF: ground (-0.08734024 0.3887658 -0.1430275) fixed=true
  Marker L.TT: ground (-0.0009248937 0.3666166 -0.08638952) fixed=true
  Marker R.TT: ground (-0.002218585 0.3737008 0.0823726) fixed=true
  Marker R.MT2: ground (0.07091407 0.01566416 0.08742119) fixed=true
  Marker L.MT2: ground (0.07695773 0.01341335 -0.08446939) fixed=true
