# OpenSim document version 20302
MeasurementSet:
  Measurement torso_height: apply=true
    MarkerPair: markers=(STERNUM XIPHOID)
    MarkerPair: markers=(C7 T10)
    MarkerPair: markers=(T10 L1)
    BodyScale torso: axes=Y
  Measurement torso_breadth: apply=true
    MarkerPair: markers=(C7 STERNUM)
    MarkerPair: markers=(T10 XIPHOID)
    BodyScale torso: axes=(X Z)
  Measurement pelvis_w: apply=true
    MarkerPair: markers=(R.ASIS L.ASIS)
    MarkerPair: markers=(R.PSIS L.PSIS)
    MarkerPair: markers=(R.Iliac.Crest L.Iliac.Crest)
    BodyScale pelvis: axes=Z
  Measurement pelvis_d: apply=true
    MarkerPair: markers=(R.ASIS R.PSIS)
    MarkerPair: markers=(L.ASIS L.PSIS)
    MarkerPair: markers=(R.Iliac.Crest R.PSIS)
    MarkerPair: markers=(L.Iliac.Crest L.PSIS)
    BodyScale pelvis: axes=X
  Measurement pelvis_h: apply=true
    MarkerPair: markers=(R.ASIS R.GTR)
    MarkerPair: markers=(R.PSIS R.GTR)
    MarkerPair: markers=(L.ASIS L.GTR)
    MarkerPair: markers=(L.PSIS L.GTR)
    MarkerPair: markers=(R.Iliac.Crest R.GTR)
    MarkerPair: markers=(L.Iliac.Crest L.GTR)
    BodyScale pelvis: axes=Y
  Measurement r_thigh_length: apply=true
    MarkerPair: markers=(R.GTR R.Knee)
    BodyScale femur_r: axes=Y
    BodyScale patella_r: axes=(X Y Z)
  Measurement r_thigh_breadth: apply=true
    MarkerPair: markers=(R.Knee R.Knee.Medial)
    BodyScale femur_r: axes=(X Z)
  Measurement r_tibia_length: apply=true
    MarkerPair: markers=(R.Knee R.Ankle)
    MarkerPair: markers=(R.Knee.Medial R.Ankle.Medial)
    MarkerPair: markers=(R.HF R.Ankle)
    BodyScale tibia_r: axes=Y
    BodyScale talus_r: axes=Y
  Measurement r_tibia_breadth: apply=true
    MarkerPair: markers=(R.Ankle R.Ankle.Medial)
    BodyScale tibia_r: axes=(X Z)
    BodyScale talus_r: axes=(X Z)
  Measurement r_foot_length: apply=true
    MarkerPair: markers=(R.Heel R.MT1)
    MarkerPair: markers=(R.Heel R.MT2)
    MarkerPair: markers=(R.Heel R.MT5)
    BodyScale calcn_r: axes=(X Y)
    BodyScale toes_r: axes=(X Y)
  Measurement r_foot_width: apply=true
    MarkerPair: markers=(R.MT1 R.MT5)
    BodyScale calcn_r: axes=Z
    BodyScale toes_r: axes=Z
  Measurement l_thigh_length: apply=true
    MarkerPair: markers=(L.GTR L.Knee)
    BodyScale femur_l: axes=Y
    BodyScale patella_l: axes=(X Y Z)
  Measurement l_thigh_breadth: apply=true
    MarkerPair: markers=(L.Knee L.Knee.Medial)
    BodyScale femur_l: axes=(X Z)
  Measurement l_tibia_length: apply=true
    MarkerPair: markers=(L.Knee L.Ankle)
    MarkerPair: markers=(L.Knee.Medial L.Ankle.Medial)
    MarkerPair: markers=(L.HF L.Ankle)
    BodyScale tibia_l: axes=Y
    BodyScale talus_l: axes=Y
  Measurement l_tibia_breadth: apply=true
    MarkerPair: markers=(L.Ankle L.Ankle.Medial)
    BodyScale tibia_l: axes=(X Z)
    BodyScale talus_l: axes=(X Z)
  Measurement l_foot_length: apply=true
    MarkerPair: markers=(L.Heel L.MT1)
    MarkerPair: markers=(L.Heel L.MT2)
    MarkerPair: markers=(L.Heel L.MT5)
    BodyScale calcn_l: axes=(X Y)
    BodyScale toes_l: axes=(X Y)
  Measurement l_foot_width: apply=true
    MarkerPair: markers=(L.MT1 L.MT5)
    BodyScale calcn_l: axes=Z
    BodyScale toes_l: axes=Z
